<?xml version="1.0"?>
<?xml-stylesheet type="text/xsl" href="http://jsbsim.sourceforge.net/JSBSim.xsl"?>
<fdm_config xmlns:xsi="http://www.w3.org/2001/XMLSchema-instance" name="C550" version="2.0" release="ALPHA" xsi:noNamespaceSchemaLocation="http://jsbsim.sourceforge.net/JSBSim.xsd">
	<fileheader>
		<author> Benedikt Wolf (D-eCHO) </author>
		<filecreationdate> 17 Nov 2019 </filecreationdate>
		<version>1.0</version>
	</fileheader>
	<!--
		Aeromatic Input:
		name:          C550
		type:          Multi-engine Passenger Jet Airliner, Transonic Jet Transport
		stall speed:   95.00kts
		max weight:    13300.00 lb
		length:        47.20 ft
		wing:
			span:         51.70 ft
			area:         323.00 sq-ft
			mean chord:   17.39 ft
			aspect ratio: 8.30:1
			taper ratio:  0.32:1
			incidence:    2.50 degrees
			dihedral:     4.50 degrees
			sweep:        0.00 degrees

		no. engines:   2
		engine type:   Turbine Engine
		engine layout: aft fuselage

		control type:   Conventional Controls

		gear type:     tricycle
		steering type: steering
		retractable?:  yes

		Aeromatic Output:
		wing loading:       41.18 lb/sq-ft
		- thickness ratio: 10.27%
		payload:            2419.90 lbs
		CL-alpha:           13.58 per radian
		CL-0:               0.24
		CL-max:             1.35
		CD-0:               0.04
		K:                  0.04
		Mcrit:              0.79

		min. turn radius    441.14 ft
		max. turn rate:     0.40 deg/s
	-->
	<metrics>
		<wingarea unit="FT2">   323.00 </wingarea>
		<wingspan unit="FT">    51.70 </wingspan>
		<wing_incidence unit="DEG"> 2.50 </wing_incidence>
		<chord unit="FT">    17.39 </chord>
		<htailarea unit="FT2">    67.07 </htailarea>
		<htailarm unit="FT">    19.68 </htailarm>
		<vtailarea unit="FT2">   48.22 </vtailarea>
		<vtailarm unit="FT">    23.00 </vtailarm>
		<location name="AERORP" unit="M">
			<x>  6.9 </x>
			<y>     0.00 </y>
			<z>  -0.1 </z>
		</location>
		<location name="EYEPOINT" unit="M">
			<x>    3.17 </x>
			<y>   -0.31 </y>
			<z>    0.95 </z>
		</location>
		<location name="VRP" unit="IN">
			<x>     0.0 </x>
			<y>     0.0 </y>
			<z>     0.0 </z>
		</location>
	</metrics>
	<mass_balance>
		<ixx unit="SLUG*FT2">   9333.33 </ixx>
		<iyy unit="SLUG*FT2">  17973.25 </iyy>
		<izz unit="SLUG*FT2">  28908.37 </izz>
		<emptywt unit="LBS">   7196.00 </emptywt>
		<location name="CG" unit="M">
			<x>   6.933 </x>
			<y>     0.00 </y>
			<z>   0.290 </z>
		</location>
		<pointmass name="Front Baggage">
			<weight unit="KG"> 0 </weight>
			<location name="POINTMASS" unit="M">
				<x>  1.6 </x>
				<y>  0.0 </y>
				<z>  0.4 </z>
			</location>
		</pointmass>
		<pointmass name="Pilot">
			<weight unit="KG"> 80 </weight>
			<location name="POINTMASS" unit="M">
				<x>  3.0 </x>
				<y> -0.4 </y>
				<z>  0.55 </z>
			</location>
		</pointmass>
		<pointmass name="Copilot">
			<weight unit="KG"> 80 </weight>
			<location name="POINTMASS" unit="M">
				<x>  3.0 </x>
				<y>  0.4 </y>
				<z>  0.55 </z>
			</location>
		</pointmass>
		<pointmass name="Cabin Passengers">
			<weight unit="KG"> 160 </weight>
			<location name="POINTMASS" unit="M">
				<x>  6.0 </x>
				<y>  0.0 </y>
				<z>  0.5 </z>
			</location>
		</pointmass>
		<pointmass name="Rear Baggage">
			<weight unit="KG"> 0 </weight>
			<location name="POINTMASS" unit="M">
				<x> 10.3 </x>
				<y>  0.0 </y>
				<z>  0.3 </z>
			</location>
		</pointmass>
	</mass_balance>
	<propulsion>
		<engine file="JT15D-4">
			<location unit="M">
				<x>   9.19 </x>
				<y>  -1.37 </y>
				<z>   0.76 </z>
			</location>
			<orient unit="DEG">
				<pitch>     0.00 </pitch>
				<roll>     0.00 </roll>
				<yaw>     0.00 </yaw>
			</orient>
			<feed> 0 </feed>
			<thruster file="direct">
				<sense> 1 </sense>
				<location unit="M">
					<x>   9.19 </x>
					<y>  -1.37 </y>
					<z>   0.76 </z>
				</location>
				<orient unit="DEG">
					<pitch>     0.00 </pitch>
					<roll>     0.00 </roll>
					<yaw>     0.00 </yaw>
				</orient>
			</thruster>
		</engine>
		<engine file="JT15D-4">
			<location unit="M">
				<x>   9.19 </x>
				<y>   1.37 </y>
				<z>   0.76 </z>
			</location>
			<orient unit="DEG">
				<pitch>     0.00 </pitch>
				<roll>     0.00 </roll>
				<yaw>     0.00 </yaw>
			</orient>
			<feed> 1 </feed>
			<thruster file="direct">
				<sense> 1 </sense>
				<location unit="M">
					<x>   9.19 </x>
					<y>   1.37 </y>
					<z>   0.76 </z>
				</location>
				<orient unit="DEG">
					<pitch>     0.00 </pitch>
					<roll>     0.00 </roll>
					<yaw>     0.00 </yaw>
				</orient>
			</thruster>
		</engine>
		<tank type="FUEL" number="0">
			<location unit="M">
				<x>  7.18 </x>
				<y>  -1.5 </y>
				<z>  0.0 </z>
			</location>
			<capacity unit="LBS"> 2493.12 </capacity>
			<contents unit="LBS"> 1500 </contents>
		</tank>
		<tank type="FUEL" number="1">
			<location unit="M">
				<x>  7.18 </x>
				<y>  1.5 </y>
				<z>  0.0 </z>
			</location>
			<capacity unit="LBS"> 2493.12 </capacity>
			<contents unit="LBS"> 1500 </contents>
		</tank>
	</propulsion>
	<ground_reactions>
		<contact type="BOGEY" name="NOSE">
			<location unit="M">
				<x>   1.76 </x>
				<y>     0.00 </y>
				<z>   -0.9355 </z>
			</location>
			<static_friction>  0.80 </static_friction>
			<dynamic_friction> 0.50 </dynamic_friction>
			<rolling_friction> 0.02 </rolling_friction>
			<spring_coeff unit="LBS/FT">     3990.00 </spring_coeff>
			<damping_coeff unit="LBS/FT/SEC"> 1995.00 </damping_coeff>
			<max_steer unit="DEG"> 20.00 </max_steer>
			<brake_group> NONE </brake_group>
			<retractable> 1 </retractable>
		</contact>
		<contact type="BOGEY" name="LEFT_MAIN">
			<location unit="M">
				<x>   7.20 </x>
				<y>   -2.86 </y>
				<z>   -0.9266 </z>
			</location>
			<static_friction>  0.80 </static_friction>
			<dynamic_friction> 0.50 </dynamic_friction>
			<rolling_friction> 0.02 </rolling_friction>
			<spring_coeff unit="LBS/FT">     13300.00 </spring_coeff>
			<damping_coeff unit="LBS/FT/SEC"> 6650.00 </damping_coeff>
			<max_steer unit="DEG">0</max_steer>
			<brake_group> LEFT </brake_group>
			<retractable> 1 </retractable>
		</contact>
		<contact type="BOGEY" name="RIGHT_MAIN">
			<location unit="M">
				<x>   7.20 </x>
				<y>   2.86 </y>
				<z>   -0.9266 </z>
			</location>
			<static_friction>  0.80 </static_friction>
			<dynamic_friction> 0.50 </dynamic_friction>
			<rolling_friction> 0.02 </rolling_friction>
			<spring_coeff unit="LBS/FT">     13300.00 </spring_coeff>
			<damping_coeff unit="LBS/FT/SEC"> 6650.00 </damping_coeff>
			<max_steer unit="DEG">0</max_steer>
			<brake_group> RIGHT </brake_group>
			<retractable> 1 </retractable>
		</contact>
		<contact type="STRUCTURE" name="LEFT_WING">
			<location unit="M">
				<x>   7.05511 </x>
				<y>  -7.71866 </y>
				<z>   0.345376 </z>
			</location>
			<static_friction>  1 </static_friction>
			<dynamic_friction> 1 </dynamic_friction>
			<spring_coeff unit="LBS/FT">      13300.00 </spring_coeff>
			<damping_coeff unit="LBS/FT/SEC"> 13300.00 </damping_coeff>
		</contact>
		<contact type="STRUCTURE" name="RIGHT_WING">
			<location unit="M">
				<x>   7.05511 </x>
				<y>  -7.71866 </y>
				<z>   0.345376 </z>
			</location>
			<static_friction>  1 </static_friction>
			<dynamic_friction> 1 </dynamic_friction>
			<spring_coeff unit="LBS/FT">      13300.00 </spring_coeff>
			<damping_coeff unit="LBS/FT/SEC"> 13300.00 </damping_coeff>
		</contact>
		<contact type="STRUCTURE" name="TAIL">
			<location unit="M">
				<x>  12.9375 </x>
				<y>   0.0 </y>
				<z>  0.471955 </z>
			</location>
			<static_friction>  1 </static_friction>
			<dynamic_friction> 1 </dynamic_friction>
			<spring_coeff unit="LBS/FT">      13300.00 </spring_coeff>
			<damping_coeff unit="LBS/FT/SEC"> 13300.00 </damping_coeff>
		</contact>
	</ground_reactions>
	<system file="c550-fcs.xml"/>
	<system file="c550-bleed.xml"/>
	<system file="c550-hydraulic.xml"/>
	<flight_control name="FCS: C550">

	</flight_control>
	<aerodynamics>
		<function name="aero/alpha-wing-deg">
			<todegrees>
				<property>aero/alpha-wing-rad</property>
			</todegrees>
		</function>
		<function name="aero/cL_groundeffect">
			<!--(ported from C172p:) Ground effect: occurs when aircraft flies wingspan or less above the ground-->
			<table>
				<independentVar>aero/h_b-mac-ft</independentVar>
				<tableData>
					0.0000	1.2030
					0.1000	1.1270
					0.1500	1.0900
					0.2000	1.0730
					0.3000	1.0460
					0.4000	1.0550
					0.5000	1.0190
					0.6000	1.0130
					0.7000	1.0080
					0.8000	1.0060
					0.9000	1.0030
					1.0000	1.0020
					1.1000	1.0000
				</tableData>
			</table>
		</function>
		<function name="aero/cD_groundeffect">
			<!--(ported from C172p:) Ground effect: occurs when aircraft flies wingspan or less above the ground-->
			<table>
				<independentVar>aero/h_b-mac-ft</independentVar>
				<tableData>
					0.0000	0.4800
					0.1000	0.5150
					0.1500	0.6290
					0.2000	0.7090
					0.3000	0.8150
					0.4000	0.8820
					0.5000	0.9280
					0.6000	0.9620
					0.7000	0.9880
					0.8000	1.0000
					0.9000	1.0000
					1.0000	1.0000
					1.1000	1.0000
				</tableData>
			</table>
		</function>
		<axis name="LIFT">
			<!-- Lift above 0.85 and below -0.85 is generalised -->
			<function name="aero/force/Lift_alpha">
				<description>Lift due to alpha</description>
				<product>
					<property>aero/qbar-psf</property>
					<property>metrics/Sw-sqft</property>
					<property>aero/cL_groundeffect</property>
					<table>
						<independentVar lookup="row">aero/alpha-wing-deg</independentVar>
						<tableData>
							-90		0
							-30        -0.5988727
							-24        -0.8379987
							-21         -0.735095
							-18        -0.6341737
							-15        -0.5510886
							-12        -0.5199441
							-9        -0.5141225
							-5        -0.4355386
							-2       -0.09260692
							1         0.2156526
							4         0.6686611
							7         0.9254084
							10           1.12267
							13         0.7700836
							17         0.7794116
							20         0.8499846
							23          0.937911
							90	0
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						</tableData>
					</table>
				</product>
			</function>
			<function name="aero/force/Lift_pitch_rate">
				<description>Lift due to pitch rate</description>
				<product>
					<property>aero/qbar-psf</property>
					<property>metrics/Sw-sqft</property>
					<property>velocities/q-aero-rad_sec</property>
					<property>aero/ci2vel</property>
					<value> 1.8224 </value>
				</product>
			</function>
			<function name="aero/force/Lift_alpha_rate">
				<description>Lift due to alpha rate</description>
				<product>
					<property>aero/qbar-psf</property>
					<property>metrics/Sw-sqft</property>
					<property>aero/alphadot-rad_sec</property>
					<property>aero/ci2vel</property>
					<value> 0.7077 </value>
				</product>
			</function>
			<function name="aero/force/Lift_elevator">
				<description>Lift due to Elevator Deflection</description>
				<product>
					<property>aero/qbar-psf</property>
					<property>metrics/Sw-sqft</property>
					<property>fcs/elevator-pos-rad</property>
					<value> 0.5569 </value>
				</product>
			</function>
			<function name="aero/force/Lift_flap">
				<description>Delta Lift due to flaps</description>
				<product>
					<property>aero/qbar-psf</property>
					<property>metrics/Sw-sqft</property>
					<property>fcs/flap-pos-deg</property>
					<value> 0.0150 </value>
				</product>
			</function>
			<function name="aero/force/Lift_speedbrakes">
				<description>Delta Lift due to speedbrakes</description>
				<product>
					<property>aero/qbar-psf</property>
					<property>metrics/Sw-sqft</property>
					<property>fcs/speedbrake-pos-norm</property>
					<value> -0.0100 </value>
				</product>
			</function>
		</axis>
		<axis name="DRAG">
			<!-- CD0 is based on fuselage, wing, horizontal- en vertical tail -->
			<!-- Antennas, struts and wires are not taken into account        -->
			<!-- CD for gear (fixed and retractable) is defined below         -->
			<function name="aero/force/Drag_minimum">
				<description>Minimum drag</description>
				<product>
					<property>aero/qbar-psf</property>
					<property>metrics/Sw-sqft</property>
					<value> 0.02415 </value>
				</product>
			</function>
			<function name="aero/force/Drag_alpha">
				<description>Drag due to alpha</description>
				<product>
					<property>aero/qbar-psf</property>
					<property>metrics/Sw-sqft</property>
					<property>/alpha-factor</property>
					<table>
						<independentVar lookup="row">aero/alpha-rad</independentVar>
						<tableData>
						-1.57    1.4089
						-0.08    0.0202
						0.00    0.0000
						0.08    0.0202
						1.57    1.4089
						</tableData>
					</table>
				</product>
			</function>
			<function name="aero/force/Drag_induced">
				<description>Induced drag</description>
				<product>
					<property>aero/qbar-psf</property>
					<property>metrics/Sw-sqft</property>
					<property>aero/cl-squared</property>
					<property>aero/cD_groundeffect</property>
					<property>/ind-factor</property>
					<value> 0.035 </value>
				</product>
			</function>
			<function name="aero/force/Drag_mach">
				<description>Drag due to mach</description>
				<product>
					<property>aero/qbar-psf</property>
					<property>metrics/Sw-sqft</property>
					<table>
						<independentVar lookup="row">velocities/mach</independentVar>
						<tableData>
							0.00    0.0000
							0.79    0.0000
							1.10    0.0230
							1.80    0.0150
						</tableData>
					</table>
				</product>
			</function>
			<function name="aero/force/Drag_beta">
				<description>Drag due to sideslip</description>
				<product>
					<property>aero/qbar-psf</property>
					<property>metrics/Sw-sqft</property>
					<table>
						<independentVar lookup="row">aero/beta-rad</independentVar>
						<tableData>
              -1.57    1.2300
              -0.26    0.0500
               0.00    0.0000
               0.26    0.0500
               1.57    1.2300
            </tableData>
					</table>
				</product>
			</function>
			<function name="aero/force/Drag_elevator">
				<description>Drag due to Elevator Deflection</description>
				<product>
					<property>aero/qbar-psf</property>
					<property>metrics/Sw-sqft</property>
					<abs>
						<property>fcs/elevator-pos-rad</property>
					</abs>
					<value> 0.0400 </value>
				</product>
			</function>
			<function name="aero/force/Drag_gear">
				<description>Drag due to gear</description>
				<product>
					<property>aero/qbar-psf</property>
					<property>metrics/Sw-sqft</property>
					<property>gear/gear-pos-norm</property>
					<value> 0.0150 </value>
				</product>
			</function>
			<function name="aero/force/Drag_flap">
				<description>Drag due to flaps</description>
				<product>
					<property>aero/qbar-psf</property>
					<property>metrics/Sw-sqft</property>
					<property>fcs/flap-pos-deg</property>
					<value> 0.0018 </value>
				</product>
			</function>
			<function name="aero/force/Drag_speedbrakes">
				<description>Drag due to speedbrakes</description>
				<product>
					<property>aero/qbar-psf</property>
					<property>metrics/Sw-sqft</property>
					<property>fcs/speedbrake-pos-norm</property>
					<value> 0.0411 </value>
				</product>
			</function>
		</axis>
		<axis name="SIDE">
			<function name="aero/force/Side_beta">
				<description>Side force due to beta</description>
				<product>
					<property>aero/qbar-psf</property>
					<property>metrics/Sw-sqft</property>
					<property>aero/beta-rad</property>
					<value> -0.6604 </value>
				</product>
			</function>
			<function name="aero/force/Side_roll_rate">
				<description>Side force due to roll rate</description>
				<product>
					<property>aero/qbar-psf</property>
					<property>metrics/Sw-sqft</property>
					<property>aero/bi2vel</property>
					<property>velocities/p-aero-rad_sec</property>
					<value>0.0042</value>
				</product>
			</function>
			<function name="aero/force/Side_yaw_rate">
				<description>Side force due to yaw rate</description>
				<product>
					<property>aero/qbar-psf</property>
					<property>metrics/Sw-sqft</property>
					<property>aero/bi2vel</property>
					<property>velocities/r-aero-rad_sec</property>
					<value> 0.5876 </value>
				</product>
			</function>
			<function name="aero/force/Side_rudder">
				<description>Side force due to rudder</description>
				<product>
					<property>aero/qbar-psf</property>
					<property>metrics/Sw-sqft</property>
					<property>fcs/rudder-pos-rad</property>
					<value> 0.2100 </value>
				</product>
			</function>
		</axis>
		<axis name="PITCH">
			<function name="aero/moment/Pitch_alpha">
				<description>Pitch moment due to alpha</description>
				<product>
					<property>aero/qbar-psf</property>
					<property>metrics/Sw-sqft</property>
					<property>metrics/cbarw-ft</property>
					<property>aero/alpha-rad</property>
					<value> -0.6208 </value>
				</product>
			</function>
			<function name="aero/moment/Pitch_elevator">
				<description>Pitch moment due to elevator</description>
				<product>
					<property>aero/qbar-psf</property>
					<property>metrics/Sw-sqft</property>
					<property>metrics/cbarw-ft</property>
					<property>fcs/elevator-pos-rad</property>
					<table>
						<independentVar lookup="row">velocities/mach</independentVar>
						<tableData>
              0.0    -0.5890
              2.0    -0.1473
            </tableData>
					</table>
				</product>
			</function>
			<function name="aero/moment/Pitch_damp">
				<description>Pitch moment due to pitch rate</description>
				<product>
					<property>aero/qbar-psf</property>
					<property>metrics/Sw-sqft</property>
					<property>metrics/cbarw-ft</property>
					<property>aero/ci2vel</property>
					<property>velocities/q-aero-rad_sec</property>
					<value> -2.0633 </value>
				</product>
			</function>
			<function name="aero/moment/Pitch_alphadot">
				<description>Pitch moment due to alpha rate</description>
				<product>
					<property>aero/qbar-psf</property>
					<property>metrics/Sw-sqft</property>
					<property>metrics/cbarw-ft</property>
					<property>aero/ci2vel</property>
					<property>aero/alphadot-rad_sec</property>
					<value> -0.8013 </value>
				</product>
			</function>
		</axis>
		<axis name="ROLL">
			<function name="aero/moment/Roll_beta">
				<description>Roll moment due to beta</description>
				<product>
					<property>aero/qbar-psf</property>
					<property>metrics/Sw-sqft</property>
					<property>metrics/bw-ft</property>
					<property>aero/beta-rad</property>
					<property>fcs/gear-no-wow</property>
					<table>
						<independentVar lookup="row">aero/alpha-rad</independentVar>
						<independentVar lookup="column">aero/Re</independentVar>
						<tableData>
                         17764526 19540978 26646788 35980892
                 -0.0349  -0.3177  -0.2420  -0.2387  -0.2375
                  0.3491  -0.3177  -0.2420  -0.2387  -0.2375
             </tableData>
					</table>
				</product>
			</function>
			<function name="aero/moment/Roll_damp">
				<description>Roll moment due to roll rate</description>
				<product>
					<property>aero/qbar-psf</property>
					<property>metrics/Sw-sqft</property>
					<property>metrics/bw-ft</property>
					<property>aero/bi2vel</property>
					<property>velocities/p-aero-rad_sec</property>
					<value> -1.4036 </value>
				</product>
			</function>
			<function name="aero/moment/Roll_yaw">
				<description>Roll moment due to yaw rate</description>
				<product>
					<property>aero/qbar-psf</property>
					<property>metrics/Sw-sqft</property>
					<property>metrics/bw-ft</property>
					<property>aero/bi2vel</property>
					<property>velocities/r-aero-rad_sec</property>
					<table>
						<independentVar>aero/alpha-rad</independentVar>
						<tableData>
							-0.0349  -0.0705
							0.3491   1.2329
						</tableData>
					</table>
				</product>
			</function>
			<function name="aero/moment/Roll_aileron">
				<description>Roll moment due to aileron</description>
				<product>
					<property>aero/qbar-psf</property>
					<property>metrics/Sw-sqft</property>
					<property>metrics/bw-ft</property>
					<property>fcs/left-aileron-pos-rad</property>
					<table>
						<independentVar lookup="row">velocities/mach</independentVar>
						<tableData>
						0.0    0.2000
						2.0    0.0250
						</tableData>
					</table>
				</product>
			</function>
			<function name="aero/moment/Roll_rudder">
				<description>Roll moment due to rudder</description>
				<product>
					<property>aero/qbar-psf</property>
					<property>metrics/Sw-sqft</property>
					<property>metrics/bw-ft</property>
					<property>fcs/rudder-pos-rad</property>
					<value> 0.0100 </value>
				</product>
			</function>
		</axis>
		<axis name="YAW">
			<function name="aero/moment/Yaw_beta">
				<description>Yaw moment due to beta</description>
				<product>
					<property>aero/qbar-psf</property>
					<property>metrics/Sw-sqft</property>
					<property>metrics/bw-ft</property>
					<property>aero/beta-rad</property>
					<value> 0.1412 </value>
				</product>
			</function>
			<function name="aero/moment/Yaw_roll_rate">
				<description>Yaw moment due to roll rate</description>
				<product>
					<property>aero/qbar-psf</property>
					<property>metrics/Sw-sqft</property>
					<property>metrics/bw-ft</property>
					<property>aero/bi2vel</property>
					<property>velocities/p-rad_sec</property>
					<value>-0.0019</value>
				</product>
			</function>
			<function name="aero/moment/Yaw_damp">
				<description>Yaw moment due to yaw rate</description>
				<product>
					<property>aero/qbar-psf</property>
					<property>metrics/Sw-sqft</property>
					<property>metrics/bw-ft</property>
					<property>aero/bi2vel</property>
					<property>velocities/r-aero-rad_sec</property>
					<value> -0.1406 </value>
				</product>
			</function>
			<function name="aero/moment/Yaw_rudder">
				<description>Yaw moment due to rudder</description>
				<product>
					<property>aero/qbar-psf</property>
					<property>metrics/Sw-sqft</property>
					<property>metrics/bw-ft</property>
					<property>fcs/rudder-pos-rad</property>
					<value> -0.0934 </value>
				</product>
			</function>
			<function name="aero/moment/Yaw_aileron">
				<description>Adverse yaw</description>
				<product>
					<property>aero/qbar-psf</property>
					<property>metrics/Sw-sqft</property>
					<property>metrics/bw-ft</property>
					<property>fcs/left-aileron-pos-rad</property>
					<value> 0.0000 </value>
				</product>
			</function>
		</axis>
	</aerodynamics>
	<external_reactions>
 </external_reactions>
</fdm_config>
