<?xml version="1.0"?>

<!--
  File:     JT15D-4.xml
  Author:   AeromatiC++ v 3.3.10

  See: http://wiki.flightgear.org/JSBSim_Engines#FGTurbine

  Inputs:
    name:                    JT15D-4
    type:                    Turbine Engine
    thrust:                  2635.6 lbf
    bypass ratio:            3.300:1
    overall pressure ratio:  12.6:1
    augmented?               no
    injected?                no

  Outputs
    tsfc:                    0.7
    engine weight:           594.2 lbs
    engine length:           4.2 ft
    engine diameter:         2.3 ft
-->

<turbine_engine name="JT15D-4">
  <milthrust> 2635.6 </milthrust>
  <bypassratio>     2.7 </bypassratio>
  <tsfc>            0.562 </tsfc>
  <bleed>           0.03</bleed>
  <idlen1>         45.0 </idlen1>
  <idlen2>         49.0 </idlen2>
  <maxn1>         104.0 </maxn1>
  <maxn2>          96.0 </maxn2>
  <augmented>         0 </augmented>
  <injected>          0 </injected>
  <ignitionn2>	    20.0 </ignitionn2>

  <function name="IdleThrust">
   <table>
    <independentVar lookup="row">velocities/mach</independentVar>
    <independentVar lookup="column">atmosphere/density-altitude</independentVar>
    <tableData>
         -10000     0     10000   20000   30000   40000   50000   90000
     0.0  0.0430  0.0488  0.0528  0.0694  0.0899  0.1183  0.1467  0
     0.2  0.0500  0.0501  0.0335  0.0544  0.0797  0.1049  0.1342  0
     0.4  0.0040  0.0047  0.0020  0.0272  0.0595  0.0891  0.1203  0
     0.6 -0.0804 -0.0804 -0.0560 -0.0237  0.0276  0.0718  0.1073  0
     0.8 -0.2129 -0.2129 -0.1498 -0.1025  0.0474  0.0868  0.0900  0
     1.0 -0.2839 -0.2839 -0.1104 -0.0469 -0.0270  0.0552  0.0800  0
    </tableData>
   </table>
  </function>

  <function name="MilThrust">
   <table>
    <independentVar lookup="row">velocities/mach</independentVar>
    <independentVar lookup="column">atmosphere/density-altitude</independentVar>
    <tableData>
          -10000       0   10000   20000   30000   40000   50000   60000   90000
      0.0  1.2600  1.0000  0.7400  0.5340  0.3720  0.2410  0.1490  0.0580  0
      0.2  1.0860  0.8662  0.6464  0.4693  0.3292  0.2142  0.1326  0.0371  0
      0.4  0.9830  0.7873  0.5915  0.4325  0.3052  0.1992  0.1239  0.0368  0
      0.6  0.9238  0.7439  0.5640  0.4161  0.2957  0.1940  0.1205  0.0368  0
      0.8  0.8927  0.7238  0.5549  0.4130  0.2959  0.1951  0.1206  0.0376  0
      1.0  0.8721  0.7134  0.5548  0.4147  0.3026  0.2007  0.1242  0.0401  0
      1.2  0.8381  0.6942  0.5503  0.4199  0.3076  0.2054  0.1270  0.0418  0
      1.4  0.7840  0.6590  0.5341  0.4156  0.3089  0.2085  0.1293  0.0443  0
    </tableData>
   </table>
  </function>

</turbine_engine>
